variable	a loop 41
variable	t index -40 -38 -36 -34 -32 -30	-28	-26	-24	-22	-20	-18	-16	-14	-12	-10	-8	-6	-4	-2	0	2	4	6	8	10	12	14	16	18	20	22	24	26	28	30 32 34 36 38 40

units			real
boundary		p p p
box             tilt large
atom_style		full

pair_style      lj/cut 12.500
bond_style      harmonic
angle_style     cosine/squared
dihedral_style  charmm
improper_style  umbrella

pair_modify     tail yes mix arithmetic
special_bonds   dreiding
dielectric      1.0
box tilt        large
read_data       lammps.data

group			rot	id	2736 2747 2754 2758 2763 4758 4764 4769 4773 4780
group			mobile	subtract all rot
group     node  type  3

displace_atoms	rot	rotate	16.98396026420773 18.21999676701825 18.722    2.467079471582 	1.424369001678 	0.000000000000       $t

fix				freeze_linker	rot		setforce	0.0 0.0 0.0
fix       freeze_node   node  setforce  0.0 0.0 NULL

fix				min	mobile	nve
minimize		0.0 1.0e-20	10000 100000

write_data		rot$a.data

variable    	ep equal pe
print       	"Rotation angle: $t deg, Potential Energy: ${ep}"

unfix			min
unfix			freeze_linker


clear
next		t
next		a
jump		input.lammps
