variable	a loop 41
variable	t index -40 -38 -36 -34 -32 -30	-28	-26	-24	-22	-20	-18	-16	-14	-12	-10	-8	-6	-4	-2	0	2	4	6	8	10	12	14	16	18	20	22	24	26	28	30 32 34 36 38 40

units			real
boundary		p p p
box             tilt large
atom_style		full

pair_style      lj/cut 12.500
bond_style      harmonic
angle_style     hybrid cosine/squared cosine/periodic
dihedral_style  charmm
improper_style  umbrella

pair_modify     tail yes mix arithmetic
special_bonds   dreiding
dielectric      1.0
box tilt        large
read_data       lammps.data

group			rot	id	1962 1964 1971 1973 1980 1982 1988 1990
group			mobile	subtract all rot

displace_atoms	rot	rotate	18.634038201129716 26.81999999999999 25.200000000000003    2.961923597741 	0.000000000000 	0.000000000000       $t

fix				freeze_linker	rot		setforce	0.0 0.0 0.0

fix				min	mobile	nve
minimize		0.0 1.0e-20	10000 100000

write_data		rot$a.data

variable    	ep equal pe
print       	"Rotation angle: $t deg, Potential Energy: ${ep}"

unfix			min
unfix			freeze_linker


clear
next		t
next		a
jump		input.lammps
