variable	a loop 37
variable	t index  -180	-170	-160	-150	-140	-130	-120	-110	-100	-90	-80	-70	-60	-50	-40	-30	-20	-10	0	10	20	30	40	50	60	70	80	90	100	110	120	130	140	150	160	170	180

units			real
boundary		p p p
box             tilt large
atom_style		full

pair_style      lj/cut 12.500
bond_style      harmonic
angle_style     cosine/periodic
dihedral_style  harmonic
improper_style  fourier

dielectric      1.0
special_bonds   lj/coul 0.0 0.0 1.0
pair_modify     tail yes mix arithmetic
box tilt        large
read_data       lammps.data

group			rot	id	176 208 250 271 282 1466 1498 1552 1555 1584
group			mobile	subtract all rot

displace_atoms	rot	rotate	15.2894501266 	12.9539817369 	20.5279119163  2.2001612242 	1.7638800268 	-0.0022202111    $t

fix				freeze_linker	rot		setforce	0.0 0.0 0.0

fix				min	mobile	nve
minimize		0.0 1.0e-20	10000 100000

write_data		rot$a.data

variable    	ep equal pe
print       	"Rotation angle: $t deg, Potential Energy: ${ep}"

unfix			min
unfix			freeze_linker


clear
next		t
next		a
jump		input.lammps
