variable	a loop 21
variable	t index -20	-18	-16	-14	-12	-10	-8	-6	-4	-2	0	2	4	6	8	10	12	14	16	18	20

units			real
boundary		p p p
box             tilt large
atom_style		full

pair_style      lj/cut 12.500
bond_style      harmonic
angle_style     cosine/periodic
dihedral_style  harmonic
improper_style  fourier

dielectric      1.0
special_bonds   lj/coul 0.0 0.0 1.0
pair_modify     tail yes mix arithmetic
box tilt        large
read_data       lammps.data

group			rot	id	176 208 250 271 282 1466 1498 1552 1555 1584
group			mobile	subtract all rot

displace_atoms	rot	rotate	15.2935871011 	12.9488618707 	20.5270975925  2.1920520176 	1.7738962851 	-0.0008340648     $t

fix				freeze_linker	rot		setforce	0.0 0.0 0.0

fix				min	mobile	nve
minimize		0.0 1.0e-20	10000 100000

write_data		rot$a.data

variable    	ep equal pe
print       	"Rotation angle: $t deg, Potential Energy: ${ep}"

unfix			min
unfix			freeze_linker


clear
next		t
next		a
jump		input.lammps
