###
variable	dt		equal	0.001
variable	T		equal	300
###

units 		metal
dimension 	3
boundary 	p p p
atom_style 	full

pair_style      lj/cut 12.500
bond_style      harmonic
angle_style     cosine/periodic
dihedral_style  harmonic
improper_style  fourier

special_bonds   lj/coul 0.0 0.0 1.0
pair_modify     tail yes mix arithmetic
dielectric      1.0
read_data       data.MIL-47

timestep        ${dt}

###
group		node	type	1 2
group		linker	type	3 4
velocity    all create ${T} 123456 mom yes rot yes dist gaussian
###

# NVT ensemble
dump		1 all custom 10000 dump.nvt.lammpstrj id mol type x y z
fix 		nvt all nvt temp $T $T $(100.0*dt)
fix			drift all momentum 1 linear 1 1 1 rescale
thermo	        1000
thermo_style    custom step temp lx ly lz press vol pxx pyy pzz pe ke etotal
run           	1000000
unfix           nvt
undump		1


fix             nve all nve
variable        dt_dump   equal 10
dump            vels  all  custom  ${dt_dump}  vels.dat  id  type  vx  vy  vz
dump_modify     vels  format  line "%d  %d  %0.8g  %0.8g  %0.8g"
dump_modify     vels  sort  id
dump            pos   all  custom  ${dt_dump}  pos.dat   id  type  xu  yu  zu
dump_modify     pos   format  line  "%d  %d  %0.8g  %0.8g  %0.8g"
dump_modify     pos   sort  id

run             1000000 			#
unfix           nve
unfix			drift
